// SBML level 2 version 1

model ras_model()

  // Compartments:
  compartment default = 1;

  // Species:
  species s0 in default = 1e-8/default; s0 is "KRAS(gtp=None, gef=None, p_loop=None, s1s2='closed', CAAX=None, oncogenic='n')";
  species s1 in default = 1e-8/default; s1 is "NRAS(gtp=None, gef=None, p_loop=None, s1s2='closed', CAAX=None, oncogenic='n')";
  species s2 in default = 1e-8/default; s2 is "HRAS(gtp=None, gef=None, p_loop=None, s1s2='closed', CAAX=None, oncogenic='n')";
  species s3 in default = 0.000468/default; s3 is "GTP(p=None, label='n')";
  species s4 in default = 4.68e-5/default; s4 is "GDP(p=None, label='n')";
  species s5 in default = 1e-8/default; s5 is "Pi()";
  species SOS1_rasgef_None in default = 1e-8/default; SOS1_rasgef_None is "SOS1(rasgef=None)";
  species SOS2_rasgef_None in default = 1e-8/default; SOS2_rasgef_None is "SOS2(rasgef=None)";
  species RASGRF1_rasgef_None in default = 1e-8/default; RASGRF1_rasgef_None is "RASGRF1(rasgef=None)";
  species RASGRF2_rasgef_None in default = 1e-8/default; RASGRF2_rasgef_None is "RASGRF2(rasgef=None)";
  species s10 in default = 1e-8/default; s10 is "RASA1(SH2_1=None, SH3=None, SH2_2=None, PH=None, C2=None, rasgap=None)";
  species NF1_rasgap_None_CRALTRIO_None in default = 1e-8/default; NF1_rasgap_None_CRALTRIO_None is "NF1(rasgap=None, CRALTRIO=None)";
  species s12 in default = 1e-8/default; s12 is "RASA2(C2_1=None, C2_2=None, rasgap=None, PH=None, BTK=None)";
  species s13 in default = 1e-8/default; s13 is "RASA3(C2_1=None, C2_2=None, rasgap=None, PH=None, BTK=None)";
  species s14 in default = 0; s14 is "GTP(p=None, label='y')";
  species s15 in default = 0; s15 is "GDP(p=None, label='y')";
  species s16 in default = 0; s16 is "GDP(p=1, label='n') ._br_HRAS(gtp=1, gef=None, p_loop=None, s1s2='closed', CAAX=None, oncogenic='n')";
  species s17 in default = 0; s17 is "GDP(p=1, label='y') ._br_HRAS(gtp=1, gef=None, p_loop=None, s1s2='closed', CAAX=None, oncogenic='n')";
  species s18 in default = 0; s18 is "GTP(p=1, label='n') ._br_HRAS(gtp=1, gef=None, p_loop=None, s1s2='closed', CAAX=None, oncogenic='n')";
  species s19 in default = 0; s19 is "GTP(p=1, label='y') ._br_HRAS(gtp=1, gef=None, p_loop=None, s1s2='closed', CAAX=None, oncogenic='n')";
  species s20 in default = 0; s20 is "GDP(p=1, label='n') ._br_HRAS(gtp=1, gef=None, p_loop=None, s1s2='open', CAAX=None, oncogenic='n')";
  species s21 in default = 0; s21 is "GDP(p=1, label='y') ._br_HRAS(gtp=1, gef=None, p_loop=None, s1s2='open', CAAX=None, oncogenic='n')";
  species s22 in default = 0; s22 is "GTP(p=1, label='n') ._br_HRAS(gtp=1, gef=None, p_loop=None, s1s2='open', CAAX=None, oncogenic='n')";
  species s23 in default = 0; s23 is "GTP(p=1, label='y') ._br_HRAS(gtp=1, gef=None, p_loop=None, s1s2='open', CAAX=None, oncogenic='n')";

  // Parameters:
  bind_HRASclosed_GDP_kf = 10000000;
  bind_HRASclosed_GDP_kr = 175.4386;
  equilibrate_HRASclosedGDP_to_HRASopenGDP_kf = 14.8;
  equilibrate_HRASclosedGDP_to_HRASopenGDP_kr = 1.8e-5;
  bind_HRASclosed_GTP_kf = 10000000;
  bind_HRASclosed_GTP_kr = 80;
  equilibrate_HRASclosedGTP_to_HRASopenGTP_kf = 16.7;
  equilibrate_HRASclosedGTP_to_HRASopenGTP_kr = 1.8e-5;
  k_HRAS_gtpase = 1;
  k_recycle_gtp_from_gdp = 10000000;

  // Reactions:
  r0: s16 -> s2 + s4; __s16*bind_HRASclosed_GDP_kr - __s2*__s4*bind_HRASclosed_GDP_kf;
  r1: s17 -> s2 + s15; -(__s15*__s2*bind_HRASclosed_GDP_kf) + __s17*bind_HRASclosed_GDP_kr;
  r2: s18 -> s2 + s3; __s18*bind_HRASclosed_GTP_kr - __s2*__s3*bind_HRASclosed_GTP_kf;
  r3: s19 -> s2 + s14; -(__s14*__s2*bind_HRASclosed_GTP_kf) + __s19*bind_HRASclosed_GTP_kr;
  r4: s3 => s4 + s5; -(__s4*__s5*k_recycle_gtp_from_gdp);
  r5: s14 => s5 + s15; -(__s15*__s5*k_recycle_gtp_from_gdp);
  r6: s20 -> s16; -(__s16*equilibrate_HRASclosedGDP_to_HRASopenGDP_kf) + __s20*equilibrate_HRASclosedGDP_to_HRASopenGDP_kr;
  r7: s21 -> s17; -(__s17*equilibrate_HRASclosedGDP_to_HRASopenGDP_kf) + __s21*equilibrate_HRASclosedGDP_to_HRASopenGDP_kr;
  r8: s22 -> s18; -(__s18*equilibrate_HRASclosedGTP_to_HRASopenGTP_kf) + __s22*equilibrate_HRASclosedGTP_to_HRASopenGTP_kr;
  r9: s23 -> s19; -(__s19*equilibrate_HRASclosedGTP_to_HRASopenGTP_kf) + __s23*equilibrate_HRASclosedGTP_to_HRASopenGTP_kr;
  r10: s5 + s20 => s22; -(__s22*k_HRAS_gtpase);
  r11: s5 + s21 => s23; -(__s23*k_HRAS_gtpase);
end
